# Worksheet setting: ORIGIN = 1
j := sqrt(-1)
E1 := 50
E2 := 100*(j*π/4)
E3 := 150*(j*π/4)
R1 := 5
E6 := E2
W := 45
R2 := 10
R3 := 8
R4 := 10
R5 := 10
R6 := 5
E6 := E2
w := 200
Z1 := 0
Z6 := 0
L1 := 0.4
L2 := 0.1
L3 := 0.2
L4 := 0.4
L5 := 0.1
C1 := 500*10^-6
C2 := 100*10^-6
C3 := 200*10^-6
C4 := C1
f := w/(2*π) = 31.831
XC3 := 1/(w*C3) = 25
XL3 := w*L3 = 40
Z3 := R3 + j*(XL3 - XC3) = 8 + 15i
XL2 := w*L2 = 20
Z2 := R2 + j*XL2 = 10 + 20i
XC4 := 1/(w*C4) = 10
Z4 := R4 - j*XC4 = 10 - 10i
XL5 := w*L5 = 20
Z5 := j*XL5 = 20i
A := [
    -1, 1, -1, 0, 0, 0;
    1, 0, 0, -1, 1, 0;
    0, -1, 1, 0, 0, -1;
    0, Z2, Z3, 0, 0, 0;
    Z1, Z2, 0, 0, -Z5, -Z6;
    0, 0, 0, Z4, Z5, 0
] = [
    -1, 1, -1, 0, 0, 0;
    1, 0, 0, -1, 1, 0;
    0, -1, 1, 0, 0, -1;
    0, 10 + 20i, 8 + 15i, 0, 0, 0;
    0, 10 + 20i, 0, 0, -20i, 0;
    0, 0, 0, 10 - 10i, 20i, 0
]
B := [0; 0; 0; E3; E1 - E6; 0] = [0; 0; 0; 117.81i; 50 - 78.5398i; 0]
I := A^-1*B = [-0.00915625 - 5.9469i; 2.61959 - 1.19936i; 2.62875 + 4.74754i; 5.93774 - 5.95606i; 5.9469 - 0.00915625i; 0.00915625 + 5.9469i]
|I[1]| = 5.94691
|I[3]| = 5.42673
|I[5]| = 5.94691
|I[2]| = 2.8811
|I[4]| = 8.4102
|I[6]| = 5.94691
# Баланс | мощностей
|I[1]|^2*Z1 + |I[2]|^2*Z2 + |I[3]|^2*Z3 + |I[4]|^2*Z4 + |I[5]|^2*Z5 + |I[6]|^2*Z6 = 1025.92 + 607.756i
S_i := E1*conj(I[1]) + E3*conj(I[3]) + E6*conj(I[6]) = 1025.92 + 607.756i
f[1] := 0
f[2] := f[1] + E1
f[3] := f[2] - (j*I[4]*(-1/(w*C4)))
f[4] := f[3] - I[4]*R4
f[5] := f[4] - E6
f[6] := f[5] + (j*I[3]*(-1/(w*C3)))
f[7] := f[6] - E3
f[8] := f[7] + (j*w*L3*I[3])
f[9] := f[8] + I[3]*R3
# [plot: Im(f) vs Re(f)]
f = [0; 50; 109.561 + 59.3774i; 50.1831 + 118.938i; 50.1831 + 40.3982i; 168.872 - 25.3205i; 168.872 - 143.13i; -21.03 - 37.9803i; 1.77636e-14 + 1.42109e-14i]
Теоретический
W7 := arg(f[7])
W3 := arg(f[3])
ΔWp := (W3 - W7)*180/π = 68.7395
Экспериментальный
T := 2*π/w = 0.0314159
Δt := 7.9872*10^-3
ΔWe := Δt*360/T = 91.5266
It := transpose([I[1], 0, -I[4], 0, I[5]])
I[1] - I[4] + I[5] = -3.55271e-15 + 1.77636e-15i
# [plot: Im(It) vs Re(It)]
It = [-0.00915625 - 5.9469i; 0; -5.93774 + 5.95606i; 0; 5.9469 - 0.00915625i]
